*Heading
** Job name: ABAQUSModel Model name: ABAQUS
** Generated by: Abaqus/CAE 2022
*Preprint, echo=NO, model=NO, history=NO, contact=NO
**
** PARTS
**
*Part, name=LAMINA
*Node
      1,           0.,           0.,           0.
      2,           2.,           0.,           0.
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*Element, type=S4
  1,   1,   2,  28,  27
  2,   2,   3,  29,  28
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*Orientation, name=Ori-1
          1.,           0.,           0.,           0.,           1.,           0.
3, 0.
** Region: (CompositeLayup-1-1: Generated From Layup)
*Elset, elset=CompositeLayup-1-1, generate
   1,  625,    1
** Section: CompositeLayup-1-1
*Shell Section, elset=CompositeLayup-1-1, composite, orientation=Ori-1, layup=CompositeLayup-1
0.1, 3, COMPOSITE, 30., Ply-1
*Transverse Shear Stiffness
5100., 5100., 0.
*End Part
**
**
** ASSEMBLY
**
*Assembly, name=Assembly
**
*Instance, name=LAMINA-1, part=LAMINA
*End Instance
**
*Nset, nset=Set-1, instance=LAMINA-1, generate
   1,  651,   26
*Elset, elset=Set-1, instance=LAMINA-1, generate
   1,  601,   25
*Nset, nset=Set-2, instance=LAMINA-1, generate
  26,  676,   26
*Elset, elset=Set-2, instance=LAMINA-1, generate
  25,  625,   25
*End Assembly
**
** MATERIALS
**
*Material, name=COMPOSITE
*Elastic, type=LAMINA
181000.,10300.,  0.28, 7170., 7170., 3812.
*Fail Stress
2507.,1200.,  86., 184., 146.,   0.,   0.
** ----------------------------------------------------------------
**
** STEP: Step-1
**
*Step, name=Step-1, nlgeom=NO
*Static
1., 1., 1e-05, 1.
**
** BOUNDARY CONDITIONS
**
** Name: BC-1 Type: Displacement/Rotation
*Boundary
Set-1, 1, 1
Set-1, 2, 2
Set-1, 3, 3
Set-1, 4, 4
Set-1, 5, 5
Set-1, 6, 6
** Name: BC-2 Type: Displacement/Rotation
*Boundary
Set-2, 1, 1, 5.
**
** OUTPUT REQUESTS
**
*Restart, write, frequency=0
**
** FIELD OUTPUT: F-Output-1
**
*Output, field
*Node Output
CF, RF, U
*Element Output, directions=YES
CFAILURE, LE, PE, PEEQ, PEMAG, S, SDV
*Contact Output
CDISP, CSTRESS
**
** HISTORY OUTPUT: H-Output-1
**
*Output, history, variable=PRESELECT
*End Step
